UTS_bolt := 170 ksi
Y_SS304 := 180 MPa
FOS := 2
Y_bolt := 0.577*UTS_bolt = 98.09 ksi  # Approx. at 500 Kelvin
P_c := 450 psi
d := 4.5 in
A := π/4*d^2 = 15.9043 in^2
F := P_c*A = 7156.94 lbf
# Combustion Chamber to Injector Plate - 1/4-20
# Bolt Shear
d_bolt := 0.185 in
A_bolt := π/4*d_bolt^2 = 0.0268803 in^2
N_bolts := ceil(F*FOS/(A_bolt*Y_bolt)) = 6
# Bearing
d_wall := 0.257 in
t := 0.178 in
A_wall := t*d_wall = 0.045746 in^2
N_bolts := ceil(F*FOS/(A_wall*Y_SS304)) = 12
# Tear-Out
L_screw := .178*in
t_plate := 0.15 in
A_tearOut := 2*L_screw*t_plate = 0.0534 in^2
N_bolts := ceil(F*FOS/(A_tearOut*Y_SS304)) = 11
# For this, I'm not sure what the applied load is, but it's impossible for it to be greater than the above value, so that's what we'll use
# Nozzle to Combustion Chamber - 1/4-20
# Pullout Load - https://ntrs.nasa.gov/citations/20170003491
d_m := 0.25 in - (0.6495*1/(20*1/in)) = 0.217525 in
L_thread := .15 in
N := ceil(3*F/(π*d_m*Y_bolt*L_thread)) = 3
π*d_m*Y_bolt*L_thread/3 = 3351.61 lbf
# Nozzle to Bell - 10-24
# Force Determined by taking chamber pressure (actual pressure is lower but whatever) across the approx. axial area of the nozzle.
d_o := 3.5 in
d_i := 1.9 in
A_nozzle := π/4*(d_o^2 - d_i^2) = 6.78584 in^2
P_nozzle := 50 psi
F_nozzle := P_nozzle*A_nozzle = 339.292 lbf
# Assume outer wall is cold-ish
Y_SS304 := 190 MPa
# Bolt Shear
Y_Al6061 := 34 MPa
d_bolt := 0.1389 in
A_bolt := π/4*d_bolt^2 = 0.0151529 in^2
# https://www.matweb.com/search/datasheet.aspx?MatGUID=b8d536e0b9b54bd7b69e4124d8f1d20a&ckck=1
N_bolts := ceil(F_nozzle*FOS/(A_bolt*Y_bolt)) = 1
# Bearing: Nozzle (AISI 304) | Bearing: Bell (Al 6061)
d_wall_1 := 0.1960 in
t_1 := 0.24 in
d_wall_2 := 0.19 in
t_2 := 0.168 in
A_wall_1 := t_1*d_wall_1 = 0.04704 in^2
A_wall_2 := t_2*d_wall_2 = 0.03192 in^2
N_bolts := ceil(F_nozzle*FOS/(A_wall_1*Y_SS304)) = 1
N_bolts := ceil(F_nozzle*FOS/(A_wall_2*Y_Al6061)) = 5
