# Worksheet setting: ORIGIN = 1
P := 500 psi
a := (5.225/2) in = 2.6125 in
b := (5.483/2) in = 2.7415 in
r := a
σ[1] := P*a^2*(r^2 + b^2)/(r^2*(b^2 - a^2)) = 71.5813 MPa
180 MPa/σ[1] = 2.51462
σ[2] := P*a/(b - a) = 69.8161 MPa
180 MPa/σ[2] = 2.5782
