# Worksheet setting: ORIGIN = 1
# Yield Strength of Aluminum at approx. -183 C
# (https://www.matweb.com/search/datasheet.aspx?MatGUID=b8d536e0b9b54bd7b69e4124d8f1d20a&ckck=1)
# MEOP
P := 800 psi
Y_Al_cryo := 320 MPa
Y_Al := 276 MPa
# Pressure Vessel
# Tank Wall Thickness | Tank Inner Radius
t := (1/8) in = 0.125 in
r := 6 in/2 - t = 2.875 in
# Results:
σ_press := P*r/t = 126.864 MPa
Y_Al_cryo/σ_press = 2.5224
Y_Al/σ_press = 2.17557
clear(t)
# Bolt Strength Calculations | Define Bolt Diameters
F := P*(π*r^2) = 20773.8 lbf  # major, minor, close fit, free fit
# 1: 10-24
# 2: 10-32
# 3: 12-24
# 4: 12-28
# 5: 12-32
# 6: 1/4-20
# 7: 1/4-28
# 8: 1/4-32
# 9: 5/16-18
# 10: 5/16-24
# 11: 5/16-32
# 12: 3/8-16
# 13: 3/8-24
# 14: 3/8-32
# 15: 7/16-14
# 16: 7/16-20
# 17: 7/16-28
# 18: 1/2-13
# 19: 1/2-20
# 20: 1/2-28
# 21: 9/16-12
# 22: 9/16-18
# 23: 9/16-24
# 24: 5/8-11
# 25: 5/8-18
# 26: 5/8-24
# 27: 11/16-24
# 28: 3/4-10
# 29: 3/4-16
# 30: 3/4-20
# 31: 13/16-20
# 32: 7/8-9
# 33: 7/8-14
# 34: 7/8-20
# 35: 15/16-20
# 36: 1-8
# 37: 1-12
# 38: 1-20
# Bolt Shear Strength
Y_bolts := 0.5*120000 psi
# Wall Geometry
# min. length (bearing/tear-out)
l_tank := 0.125 in
l_closure := 0.375 in
# thickness from edge to hole center (tear-out)
t_tank := 0.555 in
t_closure := 0.5 in
bolts := [
    0.1900, 0.1389, 0.1960, 0.2010;
    0.1900, 0.1517, 0.1960, 0.2010;
    0.2160, 0.1649, 0.2210, 0.2280;
    0.2160, 0.1722, 0.2210, 0.2280;
    0.2160, 0.1777, 0.2210, 0.2280;
    0.2500, 0.1887, 0.2570, 0.2660;
    0.2500, 0.2062, 0.2570, 0.2660;
    0.2500, 0.2117, 0.2570, 0.2660;
    0.3125, 0.2443, 0.3230, 0.3320;
    0.3125, 0.2614, 0.3230, 0.3320
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] in
# Target FOS
FOS := 2
shear_FOS(d_bolt, N) := Y_bolts*π*d_bolt^2*N/(4*F)
bearing_FOS(d_hole, l, N) := Y_Al*N*d_hole*l/F
tearOut_FOS(t, l, N) := (0.5*Y_Al)*N*2*t*l/F
N_tank := 24
N_closure := 10
M_tank :=
    for i ∈ 1 .. length(bolts[:, 1])
        M[i, :] ← [shear_FOS(bolts[i, 2], N_tank), bearing_FOS(bolts[i, 3], l_tank, N_tank), tearOut_FOS(t_tank - bolts[i, 3]/2, l_tank, N_tank)]
        M
# For 3/8-16:
M_tank[12, :] = [4.84444, 2.23143, 2.09269]
bolts[12, :] = [0.375, 0.2983, 0.386, 0.397] in
# I don't know how to model composite materials
# G12 Glass Epoxy Material Properties:
# https://www.xx-insulation.com/uploads/G12-TECHNICAL-DATA-SHEET.pdf
# Yield Strength | Shear Strength
Y_G12 := 500 MPa  # Y
