# Hand Calculations for Test Stand Bolt Patter
# 1. Connections Between Moving Plate and Bearing Blocks, assuming  all force through these connections
n := 4*4
F := 5000 N
d_screw := 0.094 in
A_screw := d_screw^2/4
σ_shear := F/(A_screw*n) = 219.274 MPa
σ_yt := 170 ksi
σ_ys := σ_yt/2
FOS := σ_ys/σ_shear = 2.67271
# 2. Connections between the Small Angle Plate and the Moving Plate. This is a surrogate for all of the other 3/8" and 1/2" connections
n := 4
F := 5000 N
d_screw := 0.29 in
A_screw := d_screw^2/4
σ_shear := F/(A_screw*n) = 92.1524 MPa
σ_yt := 150 ksi
σ_ys := σ_yt/2
FOS := σ_ys/σ_shear = 5.61143
